// COMSOL Multiphysics 6.0.0.318 model "a7q1_comsol.mph"
// Outline of the model tree

Parameters
  k = 52[W/(m*K)]
  rho = 7850[kg/m^3]
  Cp = 460[J/(kg*K)]
  Q = 0[W/m^3]

Geometry
  geom1 "Geometry 1" (2D axisymmetric, length unit m)
    r1: Rectangle | pos = {0.02, 0}; size = {0.08, 0.14}
    pt1: Point | p = {0.02, 0.1}
    pt2: Point | p = {0.02, 0.04}
    fin: Finalize "Form Union"

Physics
  ht: HeatTransfer "Heat Transfer in Solids" on domains 1
    dependent variable T
    solid1: SolidHeatTransferModel "Solid 1" (default)
      k_mat = userdef
      k = k
      rho_mat = userdef
      rho = rho
      Cp_mat = userdef
      Cp = Cp
    init1: init "Initial Values 1" (default) | Tinit = 293.15[K]
    axi1: AxialSymmetry (default)
    ins1: ThermalInsulation (default)
    hf1: HeatFluxBoundary "Heat Flux 1" on boundaries 3 | q0_input = 5e5
    temp1: TemperatureBoundary "Temperature 1" on boundaries 2, 5, 6 | T0 = 273.15[K]
    hs1: HeatSource on domains 1 | Q0 = Q

Mesh
  mesh1 "Mesh 1" (physics-controlled)

Studies
  std1 "Study 1"
    stat: Stationary

Solver configurations
  sol1 "Solution 1" (study std1)
    v1: Variables "Dependent Variables 1"
    s1: Stationary "Stationary Solver 1"
      fc1: FullyCoupled | linsolver = d1; initstep = 0.01; minstep = 1.0E-6; maxiter = 50
      d1: Direct "Direct, heat transfer variables (ht)" | linsolver = pardiso; pivotperturb = 1.0E-13

Datasets
  dset1: Solution | solution = sol1
  rev1: Revolve2D "Revolution 2D" | data = dset1; startangle = -90; revangle = 225
  cpt1: CutPoint2D "A" | data = dset1; pointx = 0.04; pointy = 0.04
  cpt2: CutPoint2D "B" | data = dset1; pointx = 0.06; pointy = 0.07
  cpt3: CutPoint2D "C" | data = dset1; pointx = 0.06; pointy = 0.1
  cln1: CutLine2D "R=0.03" | data = dset1; genpoints = {{0.03, 0}, {0.03, 0.14}}
  cln2: CutLine2D "R=0.05" | data = dset1; genpoints = {{0.05, 0}, {0.05, 0.14}}
  cln3: CutLine2D "R=0.07" | data = dset1; genpoints = {{0.07, 0}, {0.07, 0.14}}
  cln4: CutLine2D "Z=0.05" | data = dset1; genpoints = {{0.02, 0.05}, {0.1, 0.05}}
  cln5: CutLine2D "Z=0.08" | data = dset1; genpoints = {{0.02, 0.08}, {0.1, 0.08}}
  cln6: CutLine2D "Z=0.1" | data = dset1; genpoints = {{0.02, 0.1}, {0.1, 0.1}}

Derived values
  pev1: EvalPoint "Point Evaluation 1" | data = cpt1; table = tbl1; expr = T
  pev2: EvalPoint "Point Evaluation 2" | data = cpt2; table = tbl2; expr = T
  pev3: EvalPoint "Point Evaluation 3" | data = cpt3; table = tbl3; expr = T

Tables
  tbl1: Table
    // Point Evaluation 1
    Temperature (K), Point: (0.04, 0.04) | Temperature (K), Point: (0.04, 0.04) | Temperature (K), Point: (0.04, 0.04) | Temperature (K), Point: (0.04, 0.04) | Temperature (K), Point: (0.04, 0.04) | Temperature (K), Point: (0.04, 0.04)
    332.956 | 332.956 | 332.956 | 332.956 | 332.956 | 332.956
  tbl2: Table
    // Point Evaluation 2
    Temperature (K), Point: (0.06, 0.07)
    313.097
  tbl3: Table
    // Point Evaluation 3
    Temperature (K), Point: (0.06, 0.1) | Temperature (K), Point: (0.06, 0.1) | Temperature (K), Point: (0.06, 0.1)
    302.398 | 302.398 | 302.398

Plots
  pg1: PlotGroup3D "Temperature, 3D (ht)" | data = rev1
    surf1: Surface | expr = T
  pg2: PlotGroup2D "Isothermal Contours (ht)" | data = dset1; dataisaxisym = on
    con1: Contour | expr = T; levelrounding = off
  pg3: PlotGroup1D "Temp profile(Radial)" | data = dset1
    lngr1: LineGraph | data = cln1; expr = T; legends = R=0.03
    lngr2: LineGraph | data = cln2; expr = T; legends = R=0.05
    lngr3: LineGraph | data = cln3; expr = T; legends = R=0.07
  pg4: PlotGroup1D "Temp profile(Axial)" | data = dset1
    lngr1: LineGraph | data = cln4; expr = T; legends = Z=0.05
    lngr2: LineGraph | data = cln5; expr = T; legends = Z=0.08
    lngr3: LineGraph | data = cln6; expr = T; legends = Z=0.1