// COMSOL Multiphysics 6.0.0.318 model "a7q4_comsol.mph"
// Outline of the model tree
// Components: comp1 "Component 1", comp2 "Component 2"

Parameters
  Re = 1e3

Geometry
  geom1 "Geometry 1" [comp1] (2D, length unit m)
    ls1: LineSegment | specify1 = coord; specify2 = coord; coord2 = {0, 1}
    ls2: LineSegment | specify1 = coord; specify2 = coord; coord2 = {1, 0}
    rot1: Rotate | input = ls1; rot = 330
    ls3: LineSegment | vertex1 = rot1(1) points 2; vertex2 = ls2(1) points 2; coord2 = {1, 0}
    csol1: ConvertToSolid | input = ls2, ls3, rot1
    fin: Finalize "Form Union"
  geom2 "Geometry 2" [comp2] (2D, length unit m)
    ls1: LineSegment | specify1 = coord; specify2 = coord; coord2 = {0, 1}
    ls2: LineSegment | specify1 = coord; specify2 = coord; coord2 = {1, 0}
    ls3: LineSegment | vertex1 = ls1(1) points 2; vertex2 = ls2(1) points 2
    csol1: ConvertToSolid | input = ls1, ls2, ls3
    fin: Finalize "Form Union"

Physics
  spf: LaminarFlow [geom1] on all domains
    dependent variable u = {u, v, w}
    fp1: FluidProperties (default) | rho_mat = userdef; rho = 1; mu_mat = userdef; mu = 1/Re
    init1: init "Initial Values 1" (default) | u_init = {1, 1, 0}
    wallbc1: WallBC "Wall 1" (default) | BoundaryCondition = NoSlip
    prpc1: PressurePointConstraint on points 1
  spf2: LaminarFlow [geom2] on all domains
    dependent variable u2 = {u2, v2, w2}
    fp1: FluidProperties (default) | rho_mat = userdef; rho = 1; mu_mat = userdef; mu = 1/Re
    init1: init "Initial Values 1" (default) | u_init = {1, 1, 0}
    wallbc1: WallBC "Wall 1" (default) | BoundaryCondition = Slip
    prpc1: PressurePointConstraint on points 1

Mesh
  mesh1 "Mesh 1" [geom1] (physics-controlled)
    size: MeshSizeDefault | table = cfd; hauto = 6
  mesh2 "Mesh 2" [geom2] (physics-controlled)
    size: MeshSizeDefault | table = cfd; hauto = 4

Studies
  std1 "Study 1"
    stat: Stationary
  std2 "Study 2"
    param: Parametric "Parametric Sweep" | pname = Re; plistarr = 1e4 1e5 1e7
    stat: Stationary

Solver configurations
  sol1 "Solution 1" (study std1)
    v1: Variables "Dependent Variables 1"
    s1: Stationary "Stationary Solver 1"
      fc1: FullyCoupled | linsolver = d1; initstep = 0.01; maxiter = 100
      d1: Direct "Direct, fluid flow variables (spf) (merged)" | linsolver = pardiso; pivotperturb = 1.0E-13
  sol2 "Solution 2" (study std2)
    v1: Variables "Dependent Variables 1"
    s1: Stationary "Stationary Solver 1"
      p1: Parametric | pname = Re; plistarr = 1e4 1e5 1e7; pcontinuationmode = no
      fc1: FullyCoupled | linsolver = d1; initstep = 0.01; maxiter = 100
      d1: Direct "Direct, fluid flow variables (spf)" | linsolver = pardiso; pivotperturb = 1.0E-13

Datasets
  dset1: Solution | solution = sol1
  dset2: Solution | solution = sol2
  dset3: Solution | solution = sol2

Plots
  pg1: PlotGroup2D "Velocity (spf)" | data = dset1
    surf1: Surface | expr = spf.U
  pg2: PlotGroup2D "Pressure (spf)" | data = dset1
    con1: Contour | expr = p; levelrounding = off
  pg3: PlotGroup2D "Velocity (spf) 1" | data = dset2
    surf1: Surface | expr = spf.U
  pg4: PlotGroup2D "Pressure (spf) 1" | data = dset2
    con1: Contour | expr = p; levelrounding = off